# AguaClara Water Treatment Plants
# Automated Design
# User Inputs:
# Design References
# [reference: UserInputs- 1m deep.xmcd]
# [reference: DesignAssumptions-1m deep.xmcd]
# [reference: MathFunctions.xmcd]
# [reference: PipeDatabase.xmcd]
# [reference: MinorLossCoefficients.xmcd]
# [reference: FluidsFunctions.xmcd]
# Inlet Channel:
# [reference: Inlet Channel.xmcd]
W_InletChannel = 0.36385 m
L_Channel = 2.4336 m
ND_SedPipeEntrance = 12 in
# Sedimentation Tanks:
# [reference: Sedimentation.xmcd]
N_SedTanks = 2
H_SedBelowSlope = 0.6 m
H_SedBelowStraight = 0 m
H_SedPlate = 0.48 m
HW_Sed = 1.2 m
H_Sed = 1.3 m
H_SedAbove = 0.12 m
L_Sed = 3.6889 m
L_SedPlate = 0.554256 m
B_SedPlate = 2.39729 cm
N_SedPlates = 87
AN_SedPlate = 60 deg
V_SedC = 9.89623 m/day
V_SedUp = 69.5242 m/day
# Sedimentation Tank Sludge Drain:
# [reference: SludgeDrain.xmcd]
N_SedSludgeOrifices = 36
ND_SedSludge = 3 in
Q_SludgeDrainInitial = 314.826 L/min
D_SedSludgeOrifice = 0.25 in
# Sedimentation Tank Inlet Slopes:
# [reference: Sed. Inlet Slopes.xmcd]
B_SedInlet = 3.74965 cm
H_SedInlet = 6.74446 cm
AN_SedTopInlet = 43.7769 deg
AN_SedBottom = 10 deg
A_SedInlet = 1112.26 cm^2
H_SedTopInlet = 51.11 cm
H_SedBottom = 0.0940528 m
# Sedimentation Tank Effluent Launder:
# [reference: Launder.xmcd]
N_SedLaunderOrifices = 56
Q_SedLaunderOrifices = 3.39286 L/min
Z_SedLaunder = 1.14 m
# Exit Channel:
# [reference: Exit Channel.xmcd]
W_ExitChannel = 0.36385 m
ND_SedLaunder = 4 in
H_ExitChannel = 0.55 m
L_SedLaunder = 2.8112 m
L_ExitChannel = 2.4336 m
D_SedLaunderOrifice = 0.375 in
H_PltWeir = 0.312215 m
HW_ExitChannel = 0.35 m
# Flow Controller:
# [reference: FCM.xmcd]
N_Fcm = 1
ID_FcmTube = 3.175 mm
ID_FcmTube = 0.125 in
L_FcmTube = 99.0625 cm
Q_FcmTubeMax = 285 mL/min
HL_FcmValve = 15.0907 cm
# Flocculator:
# [reference: Flocculation.xmcd]
W_FlocChannel = 0.5334 m
S_FlocBaffle = [0.0669468; 0.0821572; 0.136655; 0.334734] m
B_FlocBaffle = [0.0689468; 0.0841572; 0.138655; 0.336734] m
N_FlocBafflesMin = 38
HL_Floc = 8.45648 cm
X_FlocBaffles = [
    0.0762, 3.33917;
    0.145147, 3.00244;
    0.214094, 2.6657;
    0.28304, 2.32897;
    0.351987, 1.99223;
    0.420934, 1.6555;
    0.489881, 1.31877;
    0.558828, 0.982032;
    0.627774, 0.645298;
    0.711932, 0;
    0.796089, 0;
    0.880246, 0;
    0.964403, 0;
    1.04856, 0;
    1.13272, 0;
    1.21687, 0;
    1.30103, 0;
    1.43969, 0;
    1.57834, 0;
    1.717, 0;
    1.85565, 0;
    1.99431, 0;
    2.13296, 0;
    2.27161, 0;
    2.41027, 0;
    2.747, 0;
    3.08374, 0
] m
HW_FlocStart = 1.28456 m
W_FlocPort = 0.334734 m
L_FlocBaffles = [
    1.13305, 0.865266;
    1.31762, 1.04983;
    1.13305, 0.865266;
    1.31762, 1.04983;
    1.13305, 0.865266;
    1.31762, 1.04983;
    1.13305, 0.865266;
    1.31762, 1.04983;
    1.13305, 0.865266;
    1.30241, 0;
    1.11784, 0;
    1.30241, 0;
    1.11784, 0;
    1.30241, 0;
    1.11784, 0;
    1.30241, 0;
    1.11784, 0;
    1.24791, 0;
    1.06335, 0;
    1.24791, 0;
    1.06335, 0;
    1.24791, 0;
    1.06335, 0;
    1.24791, 0;
    1.06335, 0;
    1.04983, 0;
    0.865266, 0
] m
H_FlocPort = 0.5334 m
N_FlocBaffles = 36
Z_FlocBaffles = [
    0, 0;
    0.0669468, 0.334734;
    0, 0;
    0.0669468, 0.334734;
    0, 0;
    0.0669468, 0.334734;
    0, 0;
    0.0669468, 0.334734;
    0, 0;
    0.0821572, 0;
    0, 0;
    0.0821572, 0;
    0, 0;
    0.0821572, 0;
    0, 0;
    0.0821572, 0;
    0, 0;
    0.136655, 0;
    0, 0;
    0.136655, 0;
    0, 0;
    0.136655, 0;
    0, 0;
    0.136655, 0;
    0, 0;
    0.334734, 0;
    0, 0
] m
Gt_FlocMinFlow = 4804.38
N_FlocChannels = 2
# Entrance Tank:
# [reference: EntranceTank.xmcd]
ND_Lfom = 2 in
HL_Rm = 7.03971 cm
N_Lfom = 9
D_LfomOrifices = 6.35 mm
Q_LfomErrorMax = 1.3255 %
N_LfomOrifices = [5; 4; 2; 2; 2; 2; 1; 2; 1; 1]
L_Et = 0.5334 m
W_Et = 0.5334 m
HW_EtMin = 0.2 m
HW_EtMax = 0.4 m
H_Et = 0.5 m
ZW_Et = 1.53456 m
# Any additional needed elevations should be calculated in the files above.
# AutoCAD References
# [reference: basics.xmcd]
# [reference: pipe.xmcd]
# [reference: tank.xmcd]
# [reference: lamina.xmcd]
# [reference: cross.xmcd]
# [reference: Tee.xmcd]
# [reference: elbow.xmcd]
# [reference: Sludge.xmcd]
# [reference: Channel.xmcd]
# [reference: Manifold.xmcd]
# [reference: SedTankslopes.xmcd]
# [reference: Sed Tank Inlet Slope.xmcd]
# [reference: chemicalstock.xmcd]
# [reference: Sedimentation Tank.xmcd]
# [component: inputs SedTank]
# [reference: Flocculation Tank.xmcd]
# [component: inputs FlocTank]
# [reference: Entrance Tank.xmcd]
# [component: inputs EntranceTank]
