# AguaClara Water Treatment Plants
# Automated Design
# References
# [reference: Channel design.xmcd]
# [reference: Chemical Feed.xmcd]
# [reference: Flocculation Function.xmcd]
# [reference: GritChamber.xmcd]
# [reference: Launder.xmcd]
# [reference: Plant Elevation Design.xmcd]
# [reference: plantleveltank.xmcd]
# [reference: Sedimentation Function.xmcd]
# [reference: Sludge Drain Design Program.xmcd]
# User Inputs:
# Choose either a Pipe Schedule Number or an SDR rating:
# [component: outputs PipeSpecification]
# Engineer Entered Values: | Values used to Draw Plant:
tank_thick := 20 cm
Q_plant := 965*L/min
lvltank_thick := 20 cm
# sed tank parameters
stockplat_thick := lvltank_thick
beta := 45 deg
grit_thick := lvltank_thick
SedTank_width := 42 in  # Width of the lamella
platform_thick := 0.35 m
# length of the lamella
channel_thick := 10 cm
L_lamella := 80 cm
lamella_spacing := 5 cm  # lamella spacing
walkway_width := 1 m
# grit chamber parameters
# Would you like to use Metric of English drill bits?
# [component: outputs DrillSeries]
# Calls Functions Here:
# Chemical Feed Design
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Q_alum := ChemicalFeed(Q_plant) = 482.5 mL/min
# Channel Design
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Channel_dim := Channel(Q_plant, SedTank_width, tank_thick) = [3.6004; 0.54193; 0.7] m
# Sedimentation Tank Design
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SedTank := SedTankDesign(Q_plant, SedTank_width, lamella_spacing, L_lamella, beta, Channel_dim) = [[4.74196; 1.0668; 2.05952], 65, 1.95952, 1.35952, 12.6132, 0.2667, 0.4666]
# outputs:
[sedtank_dim/m, N_lamella, water_depth/m, z_plat/m, v_c*day/m, spaceabove/m]  # disabled
# Flocculator Design
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# The baffle positions are reported in the following way:
# There is one matrix for each channel. The first column is the x position
# of the baffle. The 2nd column is the starting y position of a baffle (ie top of the tank (0),
# or bottom of tank), the 3rd column is the final position of the baffle.
# Therefore a baffle at position x extends between the two y coordinates.
[floc_dim/m, baffle_spacing/m, tot_baffle, total_hl/m, uturnhole_dim/m, baffle_length/m, baffle_positions, Gθ_newmin, length_duetobaffles/m]  # disabled
Flocculator := flocculator(Q_plant, SedTank[:, 0][0]) = [[9.48391; 0.5334; 2.16251], [0.165274; 0.233732; 0.488518], 32, 0.102987, [0.218732; 1.1913], [1.71161; 1.60892; 1.22674], [[
    0.165274, 2.16251, 0.450897;
    0.330547, 0, 1.71161;
    0.495821, 2.16251, 0.450897;
    0.661095, 0, 1.71161;
    0.826368, 2.16251, 0.450897;
    0.991642, 0, 1.71161;
    1.15692, 2.16251, 0.450897;
    1.32219, 0, 1.71161;
    1.48746, 2.16251, 0.450897;
    1.65274, 0, 1.71161;
    1.81801, 2.16251, 0.450897;
    1.98328, 0, 1.71161;
    2.14856, 2.16251, 0.450897;
    2.31383, 0, 1.71161;
    2.4791, 2.16251, 0.450897;
    2.64438, 0, 1.71161;
    2.87811, 2.16251, 0.553585;
    3.11184, 0, 1.60892;
    3.34557, 2.16251, 0.553585;
    3.57931, 0, 1.60892;
    3.81304, 2.16251, 0.553585;
    4.04677, 0, 1.60892;
    4.2805, 2.16251, 0.553585
], [
    4.50823, 0, 1.60892;
    4.01971, 2.16251, 0.935764;
    3.53119, 0, 1.22674;
    3.04267, 2.16251, 0.935764;
    2.55415, 0, 1.22674;
    2.06563, 2.16251, 0.935764;
    1.57712, 0, 1.22674;
    1.0886, 2.16251, 0.935764;
    0.600079, 0, 1.22674
]], [[3125.6; 1562.8; 1562.8], 6251.21], 5.49127]
# Grit Chamber Design
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Grit := gritchamber(Q_plant, PipeSpecification, DrillSeries, lamella_spacing, L_lamella, beta, Channel_dim, SedTank[:, 0][0]*m, SedTank[:, 2][0]*m, Flocculator[:, 3][0]*m) = [[1.9812; 0.9048; 0.809141], 2, [5; 22; 3; 5; 4; 4; 4; 3; 3; 3], 0.2032, [0.01905]]
# Launderer Design
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Laund := Launder(Q_plant, PipeSpecification, SedTank[:, 0][0][0]*m, lamella_spacing, SedTank[:, 2][0]*m, SedTank[:, 5][0]*m, Channel_dim[1], SedTank[:, 0][0][1]*m, platform_thick, walkway_width) = [4.74196, 0.0168985, 0.1, 1.82617, 0.0391914, 94, 0.00830714, 0.219494, 0.317088, 0.1524]
# Sludge Pipe Design
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SludgePipe := Sludge(Q_plant, PipeSpecification, SedTank[:, 0][0][0]*m, lamella_spacing, SedTank_width, SedTank[:, 2][0]*m) = [0.0762, 0.00628125, 0.1]
[D_sludgedrain/m, D_orifice/m, L_sludgeports/m]
# Plant Leveling Tank
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PLT := PlantLevelingTank(Q_plant, PipeSpecification, Laund[:, 4][0]*m, Laund[:, 6][0]*m) = [[0.207465; 0.639191; 0.7], 0.1016, 0.491693, 0.591693] m
# Plant Elevation Design
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Z_elevation := PlantElevations(Q_plant, Grit, Laund, SedTank, Q_alum, PLT[:, 2][0], PLT[:, 1][0], Flocculator[:, 3][0]*m, L_lamella, 10 cm) = [3.50339; 2.90339; 2.80339; 1.60339; 2.70339; 2.65339; 2.45339; 2.75339; 2.65339; 2.45339; 2.13906; 2.13906; 2.16251; 2.06251; 2.05952; 1.95952; -1.74641; -5.45234; -6.14516; 1.35952; -7.4458; -7.35364; 2.05952] m
# Constructing Tables of Parameters:
# Defining components of Output Arrays:
[sedtank_dim, N_lamella, water_depth, z_plat, v_c, spaceabove] := SedTank
[floc_dim, baffle_spacing, tot_baffle, floctotal_hl, uturnhole_dim, baffle_length, baffle_positions, Gθ_newmin, length_duetobaffles] := Flocculator
[SedPipe_length, D_laundOrf, laundOrf_dist, manifold_elevation, HL_laundertotal, n_laundOrf, h_laundOrf, offfloor_length, Pipe9_length, D_launder] := Laund
[waste_ind, D_sludgeOrf, sludgeOrf_dist] := SludgePipe
[lvltank_dim, D_weir, H_weir, HW_plantleveling] := PLT/m
[grit_dim, n_GritRisers, n_GritOrf, D_GritRiser, D_GritOrf] := Grit
# Defining components of Table Arrays:
headerrow := ["Parameter"; "Value"; "Units"]
Parameters := [
    "Number of lamella in sedimentation tanks", N_lamella, " ";
    "critical velocity in sed tank", v_c, " meter per day";
    "number of baffles in flocculator", tot_baffle, " ";
    "total headloss through flocculator", floctotal_hl*m/cm, "centimeters";
    "length of the sedimentation inlet launder", SedPipe_length, "meters";
    "diameter of orifices in the launder", D_laundOrf*m/in, "inches";
    "distance between orifices in the launder", laundOrf_dist, "meters";
    "manifold elevation", manifold_elevation, "meters";
    "diameter of the sedimentation inlet launder", D_launder*m/in, "inches";
    "number of orifices in the launder", n_laundOrf, " ";
    "diameter of sedimentation outlet sludge pipe", waste_ind*m/in, "inches";
    "diameter of orifices in sludge pipe", D_sludgeOrf*m/cm, "centimeters";
    "distance between orifices in sludge pipe", sludgeOrf_dist, "meters";
    "Diameter of weir in Plant Leveling Tank", D_weir*m/in, "inches";
    "Height of weir in PLT", H_weir*m/in, "inches";
    "Height of the Water in the PLT", HW_plantleveling, "meters";
    "number of risers in grit chamber", n_GritRisers, " ";
    "diameter of risers in grit chamber", D_GritRiser*m/in, "inches";
    "diameter of orifices in grit chamber", D_GritOrf*m/cm, "centimeters"
]
headercolumn
Units := Parameters[:, 2]
headercolumn := Parameters[:, 0]
Z := Parameters[:, 1]
table(headerrow, headercolumn, Z) :=
    for i ∈ 0 .. length(headercolumn)
        for j ∈ 0 .. last(headerrow)
            table[i, j] ← headerrow[j] if i == 0
            otherwise
                table[i, j] ← headercolumn[i - 1] if j == 0
                table[i, j] ← Z[i - 1] if j == 1
                table[i, j] ← Units[i - 1] if j == 2
    return table
headercolumn_Dim := [" Sedimentation Tank"; "Dimensions of Flocculator"; "Dimensions of Grit Chamber"; "Dimensions of Leveling Tank"; "Dimensions of Channel"]
headerrow_Dim := ["Component"; "Length"; "Width"; "Height"; "Units"]
Dim_y := [sedtank_dim[1]; floc_dim[1]; grit_dim[1]; lvltank_dim[1]; Channel_dim[1]/m]
Dim_z := [sedtank_dim[2]; floc_dim[1]; grit_dim[2]; lvltank_dim[2]; Channel_dim[2]/m]
Dim_x := [sedtank_dim[0]; floc_dim[0]; grit_dim[0]; lvltank_dim[0]; Channel_dim[0]/m]
Units2 := ["meter"; "meter"; "meter"; "meter"; "meter"]
tableDim(headerrow_Dim, headercolumn_Dim, Dim_x, Dim_y, Dim_z, Units2) :=
    for i ∈ 0 .. length(headercolumn_Dim)
        for j ∈ 0 .. last(headerrow_Dim)
            tableDim[i, j] ← headerrow_Dim[j] if i == 0
            otherwise
                tableDim[i, j] ← headercolumn_Dim[i - 1] if j == 0
                tableDim[i, j] ← Dim_x[i - 1] if j == 1
                tableDim[i, j] ← Dim_y[i - 1] if j == 2
                tableDim[i, j] ← Dim_z[i - 1] if j == 3
                tableDim[i, j] ← Units2[i - 1] if j == 4
    return tableDim
# Constructing Plant Elevation Tables:
headerrow_elevation := ["Element"; "Elevation from bottom of the sed tank (m)"; "Elevation from platform (m)"]
# top of alum stock tank
# port on alum stock tank
# bottom of alum stock tank
# alum platform height
# valve level in the FCM
# water level in the FCM
# end of the FCM tube at maximum alum dose
# grit chamber wall
# grit chamber maximum water level
# orifice elevation in the grit chamber
# horizontal pipe centerline where it leaves the grit chamber
# water level in rapid mix
# wall height for beginning of flocculator
# water level at beginning of flocculator
# wall height for the sedimentation tank
# water level in the sedimentation tank and channel
# top of the effluent launder
# top of the plate settlers
# bottom of the plate settlers
# platform height
# weir height
# level control water height
headercolumn_elevation := [
    "top of alum stock tank";
    "port on alum stock tank";
    "bottom of alum stock tank";
    "alum platform height";
    "valve level in the FCM";
    "water level in the FCM";
    "end of the FCM tube at maximum alum dose";
    "grit chamber wall";
    "grit chamber maximum water level";
    "orifice elevation in the grit chamber";
    "horizontal pipe centerline where it leaves the grit chamber";
    "water level in rapid mix";
    "wall height for beginning of flocculator";
    "water level at beginning of flocculator";
    "wall height for the sedimentation tank";
    "water level in the sedimentation tank and channel";
    "centerline of the effluent launder";
    "top of the plate settlers";
    "bottom of the plate settlers";
    "platform height";
    "weir height";
    "level control water height";
    "level control wall height"
]
tableElevation(headerrow_elevation, headercolumn_elevation, Z_elevation) :=
    for i ∈ 0 .. length(headercolumn_elevation)
        for j ∈ 0 .. last(headerrow_elevation)
            table[i, j] ← headerrow_elevation[j] if i == 0
            otherwise
                table[i, j] ← headercolumn_elevation[i - 1] if j == 0
                table[i, j] ← Z_elevation[i - 1] if j == 1
                table[i, j] ← Z_elevation[i - 1] - Z_elevation[22] if j == 2
    return table
# Tables:
# top
# [component: inputs table(headerrow, headercolumn, Z)]
# [component: inputs tableDim(headerrow_Dim, headercolumn_Dim, Dim_x, Dim_y, Dim_z, Units2)]
# [component: inputs tableElevation(headerrow_elevation, headercolumn_elevation, Z_elevation)]
# the negative sign here for alum platform height shows that the height chosen
# for the height of the chemical platform column is larger than
# that calculated based on the headloss through the FCM and
# Grit Chamber, so that from the platform the height of the platform
# is actually below the platform to make up for the shorter height needed
