# AguaClara Design Tool
Country =  # error: This variable is undefined.
Q_Plant =  # error
Language =  # error
Country := 0
# Design References
# MathCAD dimension calculations:
# [reference: BasicClientInputs.xmcd]
# [reference: ExpertInputs.xmcd]
# [reference: DesignAssumptions.xmcd]
# [reference: MathFunctions.xmcd]
# [reference: PipeDatabase.xmcd]
# [reference: MinorLossCoefficients.xmcd]
# [reference: FluidsFunctions.xmcd]
# [reference: Sedimentation Tank.xmcd]
# [reference: Flocculator.xmcd]
# [reference: Rapid Mix.xmcd]
# [reference: LFOM.xmcd]
# [reference: EntranceTankDim.xmcd]
# [reference: LinearCdc_app37.xmcd]
# [reference: ChemStorageCylinders.xmcd]
# [reference: SRSF jcw57.xmcd]
# [reference: Materials List.xmcd]
# AutoCAD drawing programs:
# Translators:
# These are the codes that take MathCAD outputs and create AutoCAD scripts that are used to draw the plant (formerly Basics)
# [reference: MtoATranslators.xmcd]
# The wrapped MtoA translator contains the functions that the user will want to access. These functions will draw pieces with full functionality - specifying the location, dimension, and orientation of the object. Also, it contains layer control and subtraction capabilities for grouped objects.
# [reference: MtoATranslators Wrapped.xmcd]
# Plant Elements:
# These are all of the files that draw the fundamental parts of the plants (tees, elbows, tanks, pipes, etc)
# [reference: Channel.xmcd]
# [reference: cross.xmcd]
# [reference: Sludge.xmcd]
# [reference: Manifold.xmcd]
# [reference: pipe.xmcd]
# [reference: elbow.xmcd]
# [reference: Tee.xmcd]
# [reference: tank.xmcd]
# [reference: lamina.xmcd]
# [reference: adapter.xmcd]
# [reference: Tee2.xmcd]
# [reference: pvccap.xmcd]
# [reference: LaunderCap.xmcd]
# [reference: ChimneyStops.xmcd]
# [reference: laminaplain.xmcd]
# [reference: Stairs.xmcd]
# [reference: DrainChannel.xmcd]
# [reference: Manifold.xmcd]
# Specific Pieces:
# These are the codes that draw the bigger pieces of the plant (the sed tank, floc tank, etc)
# [reference: floctank.xmcd]
# [reference: SedTank- with pieces.xmcd]
# [reference: Entrance Tank.xmcd]
# [reference: ChemStockCylinders.xmcd]
# [reference: Plant Drain Channel.xmcd]
# [reference: Operator Access.xmcd]
# [reference: SRSF.xmcd]
# Layouts:
# This file will execute at the very end to create multiple views of the entire plant in paperspace
# [reference: Layouts.xmcd]
# Entrance Tank:
L_Et = 3.73915 m  # length of the entrance tank
L_EtHopper = 1.21278 m  # length of the entrance tank hopper
H_EtHopper = 0.875709 m  # height of the entrance tank hopper
H_EtTop = 0.624291 m  # height of the top part of the entrance tank above the hoppers
H_Et = 1.6 m  # height of the entrance tank
Z_Et = 0.719441 m  # elevation of the entrance tank
ND_RMPipe = 0.1524 m  # nominal diameter of the rapid mix pipe
ND_EtOverflow = 0.2032 m  # nominal diameter of the overflow weir
# Sed Tanks and Slopes:
N_SedTanks = 2
H_SedBetween = 0 cm  # Distance from the top of the inlet manifold to the bottom of the ledge supporting the lamella frame
L_Sed = 3.505 m
N_SedBays = 2  # Number of bays of inlet manifolds in each sed tank
# Length of the port through which water exits the inlet manifold
# Width of ferrous cement plates in whice one manifold port is cut
Q_SedBay = 3 L/s
# Sedimentation Tank Sludge Drain:
N_SedSludgeOrifices = 35  # per cell
Ti_SludgeDrain = 30 min  # Tank Drain time
W_SedSludge = 9.63093 cm  # Width of the sludge channel
B_SedSludgeOrifices = 10 cm  # Distance center to center between drain orifices
H_SedSludge = 4.81547 cm  # Depth of the sludge channel
T_SedSludge = 5 cm
T_SedSludge = 5 cm
# Thickness of the plate topping the sludge channel
# through which drain holes are formed
W_SedDrainCover = 19.6309 cm
D_SedSludgeOrifice = 0.011 m  # Diameter of drain orifices
W_SedInletBottom = 0.441845 m
N_SedSludgeOrifices = 35
ND_SedSludgeValve = 2 in
# Sedimentation Tank Dimensions:
Z_SedSludge = 0.0981547 m  # Height from 0 of the top of the sludge drain
Z_SedSlopes = 0.820152 m  # Height from 0 of the top of the inlet manifold
W_Sed = 2.16 m  # Total tank wall height
L_Sed = 3.505 m  # Total tank length
# Inlet Channel:
HW_InletChannel = 0.255898 m  # Width of the drop chimneys connecting channel to sed inlet manifolds
W_InletChannel = 0.408427 m  # length of drop chimmneys
L_Channel = 4.77 m
N_SedInletPipes = 2  # per sed bay
H_InletChannel = 0.355898 m
# Sedimentation Tank Effluent Launder:
N_SedLaunderOrifices = 44  # Number of orifices per launder
Q_SedLaunderOrifices = 7.12643e-5 m^3/s  # More Launder Dimensions
ND_SedLaunder = 4 in
B_SedLaunderOrifices = 0.101179 m  # Center to center launder spacing
L_SedLaunder = 2.36953 m
# Exit Channel:
D_SedLaunderOrifice = 0.511811 in
W_ExitChannel = 0.369093 m
H_ExitChannel = 0.355898 m
L_ExitChannel = 4.77 m
H_PltWeir = 0.265898 m  # height of the weir carrying water to the distribution tank
HW_ExitChannel = 0.215898 m  # water height in exit channel from 0
# Lamella:
L_SedPlate = 0.609667 m
B_SedPlate = 2.85208 cm  # center to center distance between lamella
S_SedPlate = 2.65208 cm  # spacing between lamella
N_SedPlates = 70  # Number of Sed Plates per Sedimentation Tank Bay.
AN_SedPlate = 1.0472
V_SedC = 10.2206 m/day
L_SedActive = 2.30531 m
T
V_SedUp = 68.4737 m/day
Z_SedLaunder = 1.54355 m
H_SedPlate = 0.527987 m
H_SedAbove = 0.15133 m  # Height of water needed above the lamella
N_SedPlates = 70
HW_Sed = 1.63773 m
H_Sed = 1.73773 m
Z_Mp = 1.38183 m
H_SedBayDivider = 0.820152 m
# Flocculator:
W_FlocChannel = 0.54 m
ED_Floc = 0.006 m^2/s^3
HW_FlocEnd = 1.63773 m
N_FlocChannels = 5
L_FlocTank = 17.525 m
HL_Floc = 16.7894 cm
HW_FlocStart = 1.80562 m
S_FlocBaffle = [17.135; 17.135; 17.135; 17.135; 17.6573] cm
B_FlocBaffle = [17.335; 17.335; 17.335; 17.335; 17.8573] cm
N_FlocChannelBaffles = [19; 19; 19; 19; 18]
W_FlocPort = [0.17135; 0.17135; 0.17135; 0.17135; 0.182579] m
HL_FlocChannels = [3.43018; 3.43018; 3.43018; 3.43018; 3.06872] cm
L_FlocBaffleLower = 1.3807 m
L_FlocBaffleUpper = 1.5986 m
H_FlocPort = [0.54; 0.54; 0.54; 0.54; 0.522239] m
Ti_Floc = 21.5259 min  # residence time of the flocculator
N_FlocBaffles = 94
# Materials List:
N_Launders = 4
L_LaunderPipeTotal = 9.47813 m
N_Valves = 4
N_LaunderCouplings = 4
N_ValveCouplings = 4
N_SedPlatesTotal = 280
N_SedPlatesPerSheet = 6
N_SedPlateSheets = 47
AC_ChemTanks = [
    "-layer m chlorinetanks"; "c t 132,132,132"; "chlorinetanks"; "  "; "_-view o t"; "_cylinder -4.98851,0.09076,2.91944 0.18152 0.53456"; "_cylinder -4.98851,0.09076,2.92444 0.17652 0.52956"; "_-view o t"; "_subtract -5.17003,0.09076,2.91944  -5.16503,0.09076,2.91944 "; "mirror3d all  YZ -4.65459,0.1524,0.1524 N  "
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]
AC_EntranceTank =  # error
AC_DrainChannel = [
    "-layer m DrainChannel"; "c t 214,214,214"; "DrainChannel"; "  "; "3dpoly"; "0.3,-0.40718,-0.2024"; "0.3,-0.40718,-0.27378"; "0.3,-0.00717,-0.49516"; "0.3,0.39283,-0.27378"; "0.3,0.39283,-0.2024"
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]
AC_Filter =  # no stored result
AC_SedTank =  # no stored result
AC_FlocTank = [
    "-layer m FlocTank";
    "c t 132,132,132";
    "FlocTank";
    "  ";
    "_-view o t _zoom w 0.16,4.46,0 -3.665,8.08,1.90562 _box 0,4.62,0 -3.505,7.92,1.90562 _box 0.15,4.47,-0.15 -3.655,8.07,1.90562 _subtract 0.15,4.47,-0.15  0,4.62,0 ";
    "_box -3.655,5.16,0 0.15,5.31,1.90562";
    "_box -3.655,5.85,0 0.15,6,1.90562";
    "_box -3.655,6.54,0 0.15,6.69,1.90562";
    "_box -3.655,7.23,0 0.15,7.38,1.90562";
    "-group c FlocTank y "
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]
AC_OperatorAccess = [
    "-layer m AlumPlatform"; "c t 132,132,132"; "AlumPlatform"; "  "; "_-view o f"; "_pline"; "-6.04275,2.91944"; "-5.74275,2.91944"; "-5.74275,2.71481"; "-5.44275,2.71481"
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]
AC_Layout =  # error
AC_Filter1 := submatrix(AC_Filter, 0, 598, 0, 0)
AC_SedTank1 := submatrix(AC_SedTank, 0, 598, 0, 0)
AC_Filter2 :=
    submatrix(AC_Filter, 599, last(AC_Filter), 0, 0) if last(AC_Filter) < 1197
    submatrix(AC_Filter, 599, 1197, 0, 0) otherwise
AC_SedTank2 :=
    submatrix(AC_SedTank, 599, last(AC_SedTank), 0, 0) if last(AC_SedTank) < 1197
    submatrix(AC_SedTank, 599, 1197, 0, 0) otherwise
AC_Filter3 :=
    submatrix(AC_Filter, 1198, last(AC_Filter), 0, 0) if last(AC_Filter) < 1796
    submatrix(AC_Filter, 1198, 1796, 0, 0) otherwise
AC_SedTank3 :=
    submatrix(AC_SedTank, 1198, last(AC_SedTank), 0, 0) if last(AC_SedTank) < 1796
    submatrix(AC_SedTank, 1198, 1796, 0, 0) otherwise
AC_FlocTank1 := submatrix(AC_FlocTank, 0, 598, 0, 0)
AC_ChemTanks1 := submatrix(AC_ChemTanks, 0, 598, 0, 0)
AC_FlocTank2 :=
    submatrix(AC_FlocTank, 1198, last(AC_FlocTank), 0, 0) if last(AC_FlocTank) < 1197
    submatrix(AC_FlocTank, 1198, 1796, 0, 0) otherwise
AC_ChemTanks2 :=
    submatrix(AC_ChemTanks, 1198, last(AC_ChemTanks), 0, 0) if last(AC_ChemTanks) < 1197
    submatrix(AC_ChemTanks, 1198, 1796, 0, 0) otherwise
AC_FlocTank3 :=
    submatrix(AC_FlocTank, 1198, last(AC_FlocTank), 0, 0) if last(AC_FlocTank) < 1796
    submatrix(AC_FlocTank, 1198, 1796, 0, 0) otherwise
AC_ChemTanks3 :=
    submatrix(AC_ChemTanks, 1198, last(AC_ChemTanks), 0, 0) if last(AC_ChemTanks) < 1796
    submatrix(AC_ChemTanks, 1198, 1796, 0, 0) otherwise
AC_EntranceTank1 := submatrix(AC_EntranceTank, 0, 598, 0, 0)
AC_DrainChannel1 := submatrix(AC_DrainChannel, 0, 598, 0, 0)
AC_EntranceTank2 :=
    submatrix(AC_EntranceTank, 1198, last(AC_EntranceTank), 0, 0) if last(AC_EntranceTank) < 1197
    submatrix(AC_EntranceTank, 1198, 1796, 0, 0) otherwise
AC_DrainChannel2 :=
    submatrix(AC_DrainChannel, 1198, last(AC_DrainChannel), 0, 0) if last(AC_DrainChannel) < 1197
    submatrix(AC_DrainChannel, 1198, 1796, 0, 0) otherwise
AC_DrainChannel3 :=
    submatrix(AC_DrainChannel, 1198, last(AC_DrainChannel), 0, 0) if last(AC_DrainChannel) < 1796
    submatrix(AC_DrainChannel, 1198, 1796, 0, real(AC_DrainChannel, 1198, 1796, 0, 0)) otherwise  # error: This value must be a function, but has the form: any1.
AC_EntranceTank3 :=
    submatrix(AC_EntranceTank, 1198, last(AC_EntranceTank), 0, 0) if last(AC_EntranceTank) < 1796
    submatrix(AC_EntranceTank, 1198, 1796, 0, 0) otherwise
AC_OperatorAccess1 := submatrix(AC_OperatorAccess, 0, 598, 0, 0)
AC_Layout1 := submatrix(AC_Layout, 0, 598, 0, 0)
AC_OperatorAccess2 :=
    submatrix(AC_OperatorAccess, 1198, last(AC_OperatorAccess), 0, 0) if last(AC_OperatorAccess) < 1197
    submatrix(AC_OperatorAccess, 1198, 1796, 0, 0) otherwise
AC_Layout2 :=
    submatrix(AC_Layout, 1198, last(AC_Layout), 0, 0) if last(AC_Layout) < 1197
    submatrix(AC_Layout, 1198, 1796, 0, 0) otherwise
AC_OperatorAccess3 :=
    submatrix(AC_OperatorAccess, 1198, last(AC_OperatorAccess), 0, 0) if last(AC_OperatorAccess) < 1796
    submatrix(AC_OperatorAccess, 1198, 1796, 0, 0) otherwise
AC_Layout3 :=
    submatrix(AC_Layout, 1198, last(AC_Layout), 0, 0) if last(AC_Layout) < 1796
    submatrix(AC_Layout, 1198, 1796, 0, 0) otherwise
