# [reference: MasterProgram.xmcd]
# Arbitrary design variables.
# for box spacing and heights
FilterInletTank_origin := [echanneltank_origin[0]; echanneltank_origin[1]; echanneltank_origin[2]] = [0; -0.57432; 1.38183] m
BoxDist := 2 m
# horizontal distance from inlet box to filter
Headloss := 10 cm  # difference in depth between inlet and outlet box
FilterInletBox_origin := [echannelbox_origin[0] - T_PlantWall; echannelbox_origin[1] - W_ExitChannel; echannelbox_origin[2]] = [-0.523167; -0.523167; 1.38183] m
filterinletbox_dim := [T_PlantWall; W_ExitChannel; H_ExitChannel] = [0.15; 0.373167; 0.355898] m
sedechanneltankscript :=
    layernewect ← layer_new("echanneltank", ltgrey)
    tankect ← Tank([
        echanneltank_origin[0];
        echanneltank_origin[1] - echanneltank_dim[1] - 2*T_PlantWall;
        echanneltank_origin[2]
    ], echanneltank_dim, T_PlantWall)
    layerset ← layer_set("0")
    layerfreezeect ← layer_freeze("echanneltank")
    one ← stack(layernewect, tankect, layerset, layerfreezeect)
    return one
# ***Drawn for reference***
FilterInletBoxscript :=
    layernewfib ← layer_new("SRSF inlet box", ltgrey)
    tankfib ← Tank(FilterInletTank_origin, echanneltank_dim, T_PlantWall)
    layerset ← layer_set("0")
    layerfreezefib ← layer_freeze("SRSF inlet box")
    one ← stack(layernewfib, tankfib, layerset, layerfreezefib)
    return one
FilterOutletBoxscript :=
    layernewfob ← layer_new("SRSF outlet box", ltgrey)
    tankfob ← Tank([
        FilterInletTank_origin[0];
        FilterInletTank_origin[1] - BoxDist;
        FilterInletTank_origin[2] - Headloss
    ], echanneltank_dim, T_PlantWall)
    layerset ← layer_set("0")
    layerfreezefob ← layer_freeze("SRSF outlet box")
    one ← stack(layernewfob, tankfob, layerset, layerfreezefob)
    return one
filterscript :=
    layernewfilt ← layer_new("SRSF", ltgrey)
    tankfilt ← Tank([
        FilterInletTank_origin[0];
        FilterInletTank_origin[1] - BoxDist/2;
        FilterInletTank_origin[2] - H_Sed
    ], [echanneltank_dim[0]; echanneltank_dim[1]; echanneltank_dim[2] + H_Sed], T_PlantWall)
    layerset ← layer_set("0")
    layerfreezefilt ← layer_freeze("SRSF")
    one ← stack(layernewfilt, tankfilt, layerset, layerfreezefilt)
    return one
AC_Filter := stack(sedechanneltankscript, FilterInletBoxscript, FilterOutletBoxscript, filterscript)
# [component: inputs AC_Filter]
