Q_Plant := Q_Plant
# We now use the max stock concentration as the stock concentration.
# We use the length of the entrance tank minus 20 cm as the maximum length of the dosing tube
# Design algorithm
# Calculate the maximum flow for each available tube size given error constraint from major losses.
# Calculate the number of tubes needed for each tube size
# Calculate the total chemical flow for each tube size
# Calculate the required stock concentration for each tube size
# Calculate the length of tubing required for each tube size
# Select the tubing size that is shorter than max allowed
# Find the index of the tubing size selected
# Use the index to obtain the correct value for each of the related variables.
# Linear Chemical Dose Controller
L_CdcCoagTubeMax := L_Et - 0.2 m
L_CdcChlorineTubeMax := L_Et - 0.2 m
# Main Coagulant Small-Diameter Tube Design
L_CdcCoagTube := L_CdcTube(Q_Plant, C_CoagDoseMax, C_CoagStockMax, D_TubeAvailable, HL_CdcCoag, L_CdcCoagTubeMax, EN_Coag, K_CdcTube)
Q_CoagStock := Q_ChemStock(Q_Plant, C_CoagDoseMax, C_CoagStockMax)
D_CdcCoag := D_CdcTube(Q_Plant, C_CoagDoseMax, C_CoagStockMax, D_TubeAvailable, HL_CdcCoag, L_CdcCoagTubeMax, EN_Coag, K_CdcTube)
N_CdcCoagTubes := N_CdcTube(Q_Plant, C_CoagDoseMax, C_CoagStockMax, D_TubeAvailable, HL_CdcCoag, L_CdcCoagTubeMax, EN_Coag, K_CdcTube)
C_CoagStock := C_CoagStockMax
# Chlorine Small-Diameter Tube Design
EN_Chlorine := 2
L_CdcChlorineTube := L_CdcTube(Q_Plant, C_ChlorineDoseMax, C_ChlorineStockMax, D_TubeAvailable, HL_CdcChlorine, L_CdcChlorineTubeMax, EN_Chlorine, K_CdcTube)
Q_ChlorineStock := Q_ChemStock(Q_Plant, C_ChlorineDoseMax, C_ChlorineStockMax)
D_CdcChlorine := D_CdcTube(Q_Plant, C_ChlorineDoseMax, C_ChlorineStockMax, D_TubeAvailable, HL_CdcChlorine, L_CdcChlorineTubeMax, EN_Chlorine, K_CdcTube)
N_CdcChlorineTubes := N_CdcTube(Q_Plant, C_ChlorineDoseMax, C_ChlorineStockMax, D_TubeAvailable, HL_CdcChlorine, L_CdcChlorineTubeMax, EN_Chlorine, K_CdcTube)
C_ChlorineStock := C_ChlorineStockMax
# Filter Coagulant Small-Diameter Tube Design | Deleting this will cause a lot of the drawing to fail!!!
L_FiCoagCdcTube := L_CdcTube(Q_Plant, C_FilterCoagDoseMax, C_CoagStockMax, D_TubeAvailable, HL_CdcCoag, L_CdcCoagTubeMax, EN_Coag, K_CdcTube)
Q_FiCoagStock := Q_ChemStock(Q_Plant, C_FilterCoagDoseMax, C_CoagStockMax)
D_CdcFiCoag := D_CdcTube(Q_Plant, C_FilterCoagDoseMax, C_CoagStockMax, D_TubeAvailable, HL_CdcCoag, L_CdcCoagTubeMax, EN_Coag, K_CdcTube) = in/32
N_FiCoagCdcTubes := N_CdcTube(Q_Plant, C_FilterCoagDoseMax, C_CoagStockMax, D_TubeAvailable, HL_CdcCoag, L_CdcCoagTubeMax, EN_Coag, K_CdcTube)
C_FiCoagStock := C_CoagStockMax
# Need the following...
# Select connectors/adaptors required.
# Main Coagulant CHT Float Valve Design
D_CoagFloatValveOrifice :=
    i ← 0
    while h_orifice(D_FltVlvOrificesAvail[i], Pi_VenaContractaOrifice, Q_CoagStock) ≥ H_CoagTankAboveHeadTank
        i ← i + 1
    return D_FltVlvOrificesAvail[i]
D_CoagFloatValveOrifice =  # error: This variable is undefined.
HL_CoagFloatValveOrifice := h_orifice(D_CoagFloatValveOrifice, Pi_VenaContractaOrifice, Q_CoagStock)
L_TubeStockToCHEst := 1 m
HL_CoagTubeStockToCHMax := H_CoagTankAboveHeadTank - HL_CoagFloatValveOrifice
D_CoagTubeStockToCHEst := (128*Nu_Water*L_TubeStockToCHEst*Q_CoagStock/(π*g*HL_CoagTubeStockToCHMax))^(1/4)
D_CoagTubeStockToCH := max(3/8*in, D_CoagTubeStockToCHEst)
# Use 3/8" tubing to connect the stock tank/calibration column to the constant head tank unless a larger tube is needed (which it probably never will be).
# Chlorine CHT Float Valve Design
D_ChlorFloatValveOrifice :=
    i ← 0
    while h_orifice(D_FltVlvOrificesAvail[i], Pi_VenaContractaOrifice, Q_ChlorineStock) ≥ H_CoagTankAboveHeadTank
        i ← i + 1
    return D_FltVlvOrificesAvail[i]
D_ChlorFloatValveOrifice =  # error
HL_ChlorFloatValveOrifice := h_orifice(D_ChlorFloatValveOrifice, Pi_VenaContractaOrifice, Q_ChlorineStock)
HL_ChlorTubeStockToCHMax := H_CoagTankAboveHeadTank - HL_ChlorFloatValveOrifice
D_ChlorTubeStockToCHEst := (128*Nu_Water*L_TubeStockToCHEst*Q_ChlorineStock/(π*g*HL_ChlorTubeStockToCHMax))^(1/4)
D_ChlorTubeStockToCH := max(3/8*in, D_ChlorTubeStockToCHEst)
# Use 3/8" tubing to connect the stock tank/calibration column to the constant head tank unless a larger tube is needed (which it probably never will be).
# Filter Coagulant CHT Float Valve Design
D_FilterCoagFloatValveOrifice :=
    i ← 0
    while h_orifice(D_FltVlvOrificesAvail[i], Pi_VenaContractaOrifice, Q_FiCoagStock) ≥ H_CoagTankAboveHeadTank
        i ← i + 1
    return D_FltVlvOrificesAvail[i]
D_FilterCoagFloatValveOrifice =  # error
HL_FilterCoagFloatValveOrifice := h_orifice(D_FilterCoagFloatValveOrifice, Pi_VenaContractaOrifice, Q_FiCoagStock)
HL_FilterCoagTubeStockToCHMax := H_CoagTankAboveHeadTank - HL_FilterCoagFloatValveOrifice
D_FilterCoagTubeStockToCHEst := (128*Nu_Water*L_TubeStockToCHEst*Q_FiCoagStock/(π*g*HL_FilterCoagTubeStockToCHMax))^(1/4)
D_FilterCoagTubeStockToCH := max(3/8*in, D_CoagTubeStockToCHEst)
# Use 3/8" tubing to connect the stock tank/calibration column to the constant head tank unless a larger tube is needed (which it probably never will be).
# Lever Arm Scale
L_LeverArmTotal := 36 in
L_SliderEffective := 3.5 in  # Distance between the end of the slider and the pivot point of the freefall PVC tube.
L_LeverArmEffective := L_LeverArmTotal - L_SliderEffective
L_CdcFloatArm := L_LeverArmEffective/(1 + HL_CdcCoag/HL_Flowmeasure)
# To find the length of the side of the arm with the scale and the side of the arm with the float attached, solve two equations for two unknowns. One equation is similar triangles at maximum flow. The other is that the two sides of the bar must add up to the total.
L_CdcFloatArm =  # error
L_CdcScaleArm := L_LeverArmTotal - L_CdcFloatArm
L_CdcScaleArm =  # error
