T
# AguaClara Water Treatment Plants
# Automated Design
# Add variable descriptions next to every varible so it is easy to interpret what this all means.
AguaClaraDesignToolVersion := 10  # This is used by LabVIEW to confirm that a valid design tool program is open
# User Inputs:
HW_Sed := 2 m  # This must be a calculated value.
# AutoCAD References
# Design References
# [reference: BasicInputs.xmcd]
# Use BasicClientInputs and ExpertClientInputs when this is run by LabVIEW.
# Use BasicInputs and ExpertInputs to use the program in MathCAD
# Change the reference by
# - right clicking
# - select properties
# - reference tab
# - type in the correct file name
# [reference: ExpertInputs.xmcd]
# [reference: DesignAssumptions.xmcd]
# [reference: MathFunctions.xmcd]
# [reference: PipeDatabase.xmcd]
# [reference: MinorLossCoefficients.xmcd]
# [reference: FluidsFunctions.xmcd]
# Sed Tanks and Slopes:
HW_Sed = 2 m
# [reference: Influent Sed Manifold.xmcd]
N_SedTanks = 3
B_SedPort = 5.85864 cm  # Height of the narrowest part of the manifold ports
W_SedPort = 5.85864 cm
H_SedBetween = 7.62 cm  # Distance from the top of the inlet manifold to the bottom of the ledge supporting the lamella frame
N_SedPorts = 31  # per bay
L_Sed = 9.52822 m
N_SedBays = 2  # Number of bays of inlet manifolds in each sed tank
A_SedPort = 34.3237 cm^2  # Port Area
L_SedPort = 6.76498 cm  # Length of the port through which water exits the inlet manifold
W_SedSludgeFlat = 5 cm  # Distance between tips of manifold plates (space alloted for the drain holes
W_SedSlopePlate = 30 cm  # Width of ferrous cement plates in whice one manifold port is cut
AN_SedTopInlet = 60 deg  # Angle of the top of the inlet manifold
Q_SedBay = 8.33333 L/s
42.5
AN_SedBottom = 10 deg  # Angle of the bottom of inlet manifold
L_SedSlopeManifold = 0.867897 m
W_SedSlopePlateRemaining = 0.228221 m  # This is the extra distance between the last slope and the wall
# Sedimentation Tank Sludge Drain:
(W_Sed/2 - T_ChannelWall/2)/2 = 0.50225 m
# [reference: SludgeDrain.xmcd]
# We need to make the Drain plate width separate from the drain width
N_SedSludgeOrifices = 63  # per cell
W_SedSludge = 17.9485 cm  # Width of the sludge channel
Ti_SludgeDrain = 20 min  # Tank Drain time
H_SedSludge = 8.97425 cm  # Depth of the sludge channel
B_SedSludgeOrifices = 15 cm  # Distance center to center between drain orifices
T_SedSludge = 9.33013 cm
# Thickness of the plate topping the sludge channel
# through which drain holes are formed
D_SedSludgeOrifice = 0.0142875 m  # Diameter of drain orifices
T_SedSludge = 9.33013 cm
N_SedSludgeOrifices = 63
W_SedDrainCover = 21.547 cm
ND_SedSludgeValve = 6 in
# Sedimentation Tank Dimensions:
# [reference: Sedimentation Dimensions.xmcd]
T_SedInletSlope = 0.05 m
Z_SedSludge = 18.3044 cm  # Height from 0 of the top of the sludge drain
H_SedBottomSlope = 0.0765169 m  # Height of the bottom slope
H_SedTopSlope = 0.751621 m  # Height of the top of the inlet manifold
Z_SedSlopes = 1.03467 m  # Height from 0 of the top of the inlet manifold
T_SedSludge + H_SedSludge = 0.183044 m
H_Sed = 2.1 m  # Total tank wall height
T_SedInletSlope*cos(AN_SedTopInlet) = 2.5 cm
W_Sed = 2.159 m  # Total tank width
L_Sed = 9.52822 m  # Total tank length
T_SedInletSlope*sin(90 - AN_SedTopInlet) + T_SedInletSlope*cos(AN_SedTopInlet) = 0.0667521 m
# Inlet Channel:
2*(T_SedInletSlope*sin(90 - AN_SedTopInlet) + T_SedInletSlope*cos(AN_SedTopInlet)) + W_SedSludgeFlat + 5 cm = 0.233504 m
# [reference: Inlet Channel.xmcd]
W_InletChannel = 0.645974 m
HW_Sed - HW_InletChannel - T_ChannelWall = 1.11087 m
L_Channel = 6.927 m
HW_Sed - HW_InletChannel - T_ChannelWall - (0.3633 m - T_ChannelWall) = 0.897565 m
W_SedManifoldEntrance = 0.172129 m  # Width of the drop chimneys connecting channel to sed inlet manifolds
L_SedManifoldEntrance = 0.433949 m  # length of drop chimmneys
N_SedInletPipes = 2  # per sed bay
H_InletChannel = 0.839135 m
# Sedimentation Tank Effluent Launder:
# [reference: Launder.xmcd]
N_SedLaunderOrifices = 160  # Number of orifices per launder
# How many launders per cell?
# What is the spacing of the orfices?
# How many rows of orifices per launder?
Q_SedLaunderOrifices = 1.5625 L/min
B_SedLaunderOrifices = 0.1 m  # Center to center launder spacing
# Exit Channel:
# [reference: Exit Channel.xmcd]
W_ExitChannel = 0.645974 m
ND_SedLaunder = 6 in
H_ExitChannel = 0.839135 m
L_SedLaunder = 8.08627 m
L_ExitChannel = 6.927 m
H_PltWeir = 0.604759 m  # height of the weir carrying water to the distribution tank
D_SedLaunderOrifice = 0.3125 in
HW_ExitChannel = 0.699135 m
Z_SedLaunder = 1.87586 m  # height from 0 of the launder
ZW_ExitChannel = 1.96 m  # water height in exit channel from 0
# Lamella:
# [reference: Lamella.xmcd]
L_SedPlate = 0.786189 m
42.5 in = 1.0795 m
B_SedPlate = 4.3028 cm  # center to center distance between lamella
S_SedPlate = 4.0028 cm  # spacing between lamella
N_SedPlates = 153  # Number of Sed Plates per Sedimentation Tank Bay.
AN_SedPlate = 60 deg
V_SedC = 10.0058 m/day
L_SedActive = 7.01317 m
W_Sed = 2.159 m
V_SedUp = 70 m/day
H_SedPlate = 0.68086 m
H_SedAbove = 0.208275 m  # Height of water needed above the lamella
# Sedimentation Tank Floc Hopper:
# [reference: Floc Hopper.xmcd]
A_FlocHopper = 2.592 m^2
L_FlocHopper = 2.58039 m  # Length of the hopper cement plate
L_FlocHopperOffset = 0.393095 m  # distance from the edge of the channel to the bottom of the first lamella (collection distance)
W_FlocHopper = 1.0045 m  # width of the hopper set within each bay
# Flow Controller:
# [reference: FCM.xmcd]
N_Fcm = 6
ID_FcmTube = 4.318 mm
ID_FcmTube = 0.17 in
L_FcmTube = 257.56 cm
Q_FcmTubeMax = 375 mL/min
HL_FcmValve = 26.1265 cm
# Flocculator: | Look at Flocculator Positioning arrays
# [reference: Flocculation Energy Dissapation.xmcd]
W_FlocChannel = 0.719212 m
L_Sed = 9.52822 m  # Fill last channel with bafffles from last channel
# Fix port width to be based on energy dissipation in that channel
# Adjust spacing after the number of baffles per channel is known.
ED_Floc = [6.4; 0.4] mW/kg
# Check the residence time of the flocculator should be at least 20minutes
HW_FlocEnd = 2 m
X_FlocBaffles = [
    0.394919, 0.491568, 0.916822, 0.916822, 0.916822;
    0.829838, 1.02314, 1.87364, 1.87364, 1.87364;
    1.26476, 1.5547, 2.83047, 2.83047, 2.83047;
    1.69968, 2.08627, 3.78729, 3.78729, 3.78729;
    2.1346, 2.61784, 4.74411, 4.74411, 4.74411;
    2.56951, 3.14941, 5.70093, 5.70093, 5.70093;
    3.00443, 3.68097, 6.65775, 6.65775, 6.65775;
    3.43935, 4.21254, 7.61458, 7.61458, 7.61458;
    3.87427, 4.74411, 8.5714, 8.5714, 8.5714;
    4.30919, 5.27568, 0, 0, 0;
    4.74411, 5.80725, 0, 0, 0;
    5.17903, 6.33881, 0, 0, 0;
    5.61395, 6.87038, 0, 0, 0;
    6.04887, 7.40195, 0, 0, 0;
    6.48379, 7.93352, 0, 0, 0;
    6.91871, 8.46509, 0, 0, 0;
    7.35363, 8.99665, 0, 0, 0;
    7.78854, 0, 0, 0, 0;
    8.22346, 0, 0, 0, 0;
    8.65838, 0, 0, 0, 0;
    9.0933, 0, 0, 0, 0
] m
L_FlocBaffles = [
    1.95273, 1.85608, 1.43082, 1.43082, 1.43082;
    1.60508, 1.50843, 1.08318, 1.08318, 1.08318;
    1.95273, 1.85608, 1.43082, 1.43082, 1.43082;
    1.60508, 1.50843, 1.08318, 1.08318, 1.08318;
    1.95273, 1.85608, 1.43082, 1.43082, 1.43082;
    1.60508, 1.50843, 1.08318, 1.08318, 1.08318;
    1.95273, 1.85608, 1.43082, 1.43082, 1.43082;
    1.60508, 1.50843, 1.08318, 1.08318, 1.08318;
    1.95273, 1.85608, 1.43082, 1.43082, 1.43082;
    1.60508, 1.50843, 0, 0, 0;
    1.95273, 1.85608, 0, 0, 0;
    1.60508, 1.50843, 0, 0, 0;
    1.95273, 1.85608, 0, 0, 0;
    1.60508, 1.50843, 0, 0, 0;
    1.95273, 1.85608, 0, 0, 0;
    1.60508, 1.50843, 0, 0, 0;
    1.95273, 1.85608, 0, 0, 0;
    1.60508, 0, 0, 0, 0;
    1.95273, 0, 0, 0, 0;
    1.60508, 0, 0, 0, 0;
    1.95273, 0, 0, 0, 0
] m
Z_FlocBaffles = [
    0.394919, 0.491568, 0.916822, 0.916822, 0.916822;
    0, 0, 0, 0, 0;
    0.394919, 0.491568, 0.916822, 0.916822, 0.916822;
    0, 0, 0, 0, 0;
    0.394919, 0.491568, 0.916822, 0.916822, 0.916822;
    0, 0, 0, 0, 0;
    0.394919, 0.491568, 0.916822, 0.916822, 0.916822;
    0, 0, 0, 0, 0;
    0.394919, 0.491568, 0.916822, 0.916822, 0.916822;
    0, 0, 0, 0, 0;
    0.394919, 0.491568, 0, 0, 0;
    0, 0, 0, 0, 0;
    0.394919, 0.491568, 0, 0, 0;
    0, 0, 0, 0, 0;
    0.394919, 0.491568, 0, 0, 0;
    0, 0, 0, 0, 0;
    0.394919, 0.491568, 0, 0, 0;
    0, 0, 0, 0, 0;
    0.394919, 0, 0, 0, 0;
    0, 0, 0, 0, 0;
    0.394919, 0, 0, 0, 0
] m
N_FlocChannels = 5
L_FlocTank = 47.6411 m
HL_Floc = 24.7644 cm
HW_FlocStart = 2.24764 m
S_FlocBaffle = [39.4919; 49.1568; 91.6822; 91.6822; 91.6822] cm
B_FlocBaffle = [43.4919; 53.1568; 95.6822; 95.6822; 95.6822] cm
N_FlocChannelBaffles = [21; 17; 9; 9; 9]
W_FlocPort = [0.394919; 0.491568; 0.916822; 0.916822; 0.916822] m
HL_FlocChannels = [13.9041; 7.34245; 1.17264; 1.17264; 1.17264] cm
L_FlocBaffleLower = [1.60508; 1.50843; 1.08318; 1.08318; 1.08318] m
L_FlocBaffleUpper = [1.95273; 1.85608; 1.43082; 1.43082; 1.43082] m
H_FlocPort = 0.719212 m
Ti_Floc = 22.8427 min  # residence time of the flocculator
N_FlocBaffles = 65
# Entrance Tank:
# [reference: EntranceTankDim.xmcd]
L_Et = 9.52822 m  # length of the entrance tank
W_Et = 0.719212 m  # width of the entrance tank
HW_EtMin = 0.2 m
HW_EtMax = 0.4 m
H_Et = 2.64764 m  # height of the entrance tank
ZW_Et = 2.54764 m
# Any additional needed elevations should be calculated in the files above.
# Elevations:
ZW_ExitChannel = 1.96 m  # Water Level at the end of the plant in the exit channel and exit channel box
HW_Sed = 2 m
HW_FlocStart = 2.24764 m  # Water level at the beginning of the floc tank
HL_Floc = 24.7644 cm  # just for ref. the head loss throught the floc tank
ZW_Et = 2.54764 m  # the height of the water in the entrance tank.
# Rapid Mix:
# [reference: RapidMixer.xmcd]
# Assumptions: To be moved to basic inputs file
W_EtOrifice[30] = 0.031 m  # Height of Entrance Tank Orifice
# Calculations
L_trueET[30] = 1.29264 m  # Length of Entrance Tank Orifice
Pi_EtFlow[30] = 0.278388  # Ratio of the minimum flow divided by the maximum flow through the plant.
L_FlocEntryOrifice = 71.9212 cm  # Length of orifice entering into flocculator from Rapid Mix Unit
W_FlocEntryOrifice = 12.1424 cm  # Height of orifice entering into flocculator
ED_Diffusion = 0.732512 m^2/s^3  # Minimum Energy Dissipation needed
HL_FlocEntryOrifice = 7.13979 cm  # Head loss caused by entering flocculation tank.
A_FlocEntry = 0.0873298 m^2  # Area required of entry port to flocculator
A_EtOrifice = 400.718 cm^2  # Area of Entrance Tank Orifice
HW_Total = 2.74367 m  # Total Height of water at beginning of rapid mix unit
HW_Channel2 = 14.806 cm  # Height of water at the back of the entrance tank channel (from channel bottom)
HW_EtChannel = 7.65681 cm  # Height of Waterfall into flocculator
W_EtChannel = 39.4919 cm  # Widt of entrance tank channel
L_Et = 2.48424 m  # Length of square entrance tank
Vol_Stock = 4050 L  # Volume of chemical stock tanks
# [reference: AutoCADMasterProgram.xmcd]
# AutoCAD References
FlocTank = [
    "-layer m floctank"; "c t 91,91,91"; "floctank"; "  "; "_-view o t _zoom w 0.16,6.767,0 -9.68822,11.28306,2.34764 _box 0,6.927,0 -9.52822,11.12306,2.34764 _box 0.15,6.777,-0.15 -9.67822,11.27306,2.34764 _subtract 0.15,6.777,-0.15  0,6.927,0 "; "-layer s 0"; "  "; "-layer f floctank"; "  "; "-layer m floctankwall"
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]
