# [reference: MasterProgram.xmcd]
# Automated Materials List
# This is actually the length of the  launders
L_LaunderPipe := L_SedLaunder
# Length of a pipe.
N_Launders := N_SedTanks*N_SedBays*N_SedLaunders
L_LaunderPipeTotal := L_LaunderPipe*N_Launders  # Total length of launder pipe
N_Valves := N_SedBays*N_SedTanks  # There are 2 sed inlet pipes per sed bay.
N_LaunderCouplings := N_Launders
N_ValveCouplings := N_Valves
N_SedPlatesTotal := N_SedPlates*N_SedBays*N_SedTanks
N_SedPlatesPerSheet := floor(L_SedPlateSheet/L_SedPlate)
N_SedPlateSheets := ceil(N_SedPlatesTotal/N_SedPlatesPerSheet) = 234  # Total number of corrugated sheets needed to construct lamella/plate settlers (?)
N_PipeSedPlateFrame := W_Sed/B_PipeSedPlateFrame - 1 + L_Sed/B_PipeSedPlateFrame - 1
L_PipeSedPlateFrameTotal := N_SedTanks*((W_Sed/B_PipeSedPlateFrame - 1)*L_Sed + (L_Sed/B_PipeSedPlateFrame - 1)*W_Sed)
N_PipeSedPlateStand := L_SedLaunder/B_PipeSedPlateStand
L_PipeSedPlateStand := N_PipeSedPlateStand
T_SedTank := T_ChannelWall
# This area is the area of the side of tank in plan view.
A_SedTank := (L_Sed + 2*T_PltWall)*(W_Sed*N_SedTanks + (N_SedTanks + 1)*T_PltWall) = 68.8503 m^2
A_FlocTank := (L_Sed + 2*T_PltWall)*(W_FlocChannel*N_FlocChannels + (N_FlocChannels - 1)*T_PltWall) = 44.946 m^2
A_EntranceTank := (L_Et + T_PltWall)*(W_Et + 2*T_PltWall) = 7.33433 m^2
# Standard Cement
Vol_FlocTank := 2*(L_Sed + T_PlantWall)*T_PlantWall*H_Floc + 2*(W_FlocChannel*N_FlocChannels + N_FlocChannels*T_PlantWall)*T_PlantWall*H_Floc + A_FlocTank*T_PlantWall = 14153.7 L
Vol_InletChannel := (W_InletChannel*H_InletChannel*T_SedManifoldEntrance) + (W_InletChannel + 2*T_ChannelWall)*T_PlantWall + 2*(L_InletChannel*T_ChannelWall*H_InletChannel) - (A_SedManifoldEntrance*T_SedManifoldEntrance*N_SedInletPipes)
# **Includes Sedimentation Manifold Entrance**
Vol_ExitChannel := (W_ExitChannel + 2*T_PlantWall)*T_PlantWall*H_ExitChannel + 2*(L_ExitChannel*T_ChannelWall*H_ExitChannel) = 1758.79 L
# **Does not include inlet from sed tank and exit to storage tank**
Vol_SedTank := A_SedTank*T_PlantWall + 2*((L_Sed + T_PltWall)*T_PlantWall*H_Sed) + 2*(W_Sed*N_SedTanks + N_SedTanks*T_PltWall)*T_PlantWall*H_Sed = 17886 L
Vol_EntranceTank := 2*(W_Et + T_EtWall)*T_EtWall*H_Et + 2*(L_Et + T_EtWall)*T_EtWall*H_Et + A_EntranceTank*T_EtWall = 4456.1 L
# **basic dimensions - no grit chamber**
Vol_SludgeDrains := N_SedSludge*(π*(T_SedSludge^2)*L_Sed - (π*(D_SedSludgeOrifice/2)^2*T_SedSludge*N_SedSludgeOrifices))
Vol_AlumStockTank := Q_AlumStockMax*Ti_StockMin
# Ferrous Cement
Vol_SedTankSlopes := T_SedSlopePlate*L_SedSlopeManifold*W_SedSlopePlate*N_SedPorts = 184.99 L
Vol_FlocBafflesTotal := W_FlocChannel*T_FlocBaffle*(L_FlocBaffleLower*ceil(N_FlocChannelBaffles/2) + L_FlocBaffleUpper*floor(N_FlocChannelBaffles/2))*N_FlocChannels = 20974.2 L
